// COMSOL Multiphysics 6.2.0.290 model "3D_bubble_basic_model.mph"
// Outline of the model tree
// Unit system: none

Parameters
  radius = 1  // radius
  L_rise = 10  // para1
  center = 2.5  // center
  height = L_rise+center+1  // height
  width = 4  // width
  Ga = 40  // para2
  Bo = 10  // para3
  rho1 = 1  // rho1
  rho2 = rho1/1000  // rho2
  mu1 = 1/Ga  // mu1
  mu2 = mu1/100  // mu2
  refine = 3
  sigma = 1/Bo  // sigma
  g_used = 1
  t_step = 0.05
  t_max = 20

Variables
  var1 "变量 1"
    Volume = intop1(1.0)  // area
    velocity = intop1(w)/Volume  // velocity
    center_z = intop1(z)/Volume  // center
    center_x = intop1(x)/Volume  // center
    center_y = intop1(y)/Volume  // center

Couplings
  intop1: Integration "积分 1" on domains 2

Common definitions
  free1: DeformingDomain "变形域 1" on all domains
  fix1: FixedBoundary "固定边界 1" on boundaries 1-5, 14

Geometry
  geom1 "几何 1" (3D, length unit m)
    blk1: Block "长方体 1" | pos = {-width, -width, -height}; size = {width*2, width*2, height}
    sph1: Sphere "球体 1" | pos = {0, 0, -height+center}; rot = 360
    fin: Finalize "形成联合体"

Materials
  mat1: Common "liquid" on all domains
    def "Basic"
      density = rho1
      dynamicviscosity = mu1
  mat2: Common "air" on domains 2
    def "Basic"
      density = rho2
      dynamicviscosity = mu2

Physics
  spf: LaminarFlow "层流" on all domains
    dependent variable u = {u, v, w}
    PhysicalModelProperty.Compressibility = Incompressible
    PhysicalModelProperty.IncludeGravity = 1
    ConsistentStabilization.CrosswindDiffusion = 0
    fp1: FluidProperties "流体属性 1" (default)
    init1: init "初始值 1" (default)
    wallbc1: WallBC "壁 1" (default)
    grav1: Gravity "重力 1" | g = {0, 0, -g_used}
    inl1: InletBoundary "入口 1" on boundaries 3
    out1: OutletBoundary "出口 1" on boundaries 1, 2, 5, 14
    ffi1: FluidFluidInterface "流体-流体界面 1" on boundaries 6-13
      cnta1: ContactAngle "接触角 1" (default)

Mesh
  mesh1 "网格 1"
    size: MeshSizeDefault "大小" | hmax = 1.35; hmin = 0.243; hcurve = 0.6; hnarrow = 0.5; hgrad = 1.5
    ftri1: FreeTri "自由三角形网格 1" on boundaries 6-13
      size2: Size "大小 2" on boundaries 4, 6-13
        table = cfd
        hmax = 1/(2^refine)
        hmin = 1/(2^refine*32)
        hcurve = 0.2
        hnarrow = 3
        custom = on
    ftet1: FreeTet "自由四面体网格 1" on remaining entities
      size1: Size "大小 1" on entire geometry
        table = cfd
        hmax = 1/4
        hmin = 1/(2^refine*32)
        hcurve = 0.2
        custom = on
        hgrad = 1.1
        hnarrow = 1

Studies
  std1 "研究 1"
    time: Transient "瞬态" | tlist = range(0,0.01,1); autoremesh = on

Solver configurations
  sol1 "解 1" (study std1)
    v1: Variables "Dependent Variables 1"
      comp1_spatial_disp: Field "Spatial mesh displacement (comp1.spatial.disp)"
        scalemethod = manual
        scaleval = 0.0618577934245
    t1: Time "Time-Dependent Solver 1"
      tlist = range(0,0.01,1)
      rtol = 0.005
      atolglobalfactor = 0.05
      atolmethod = {comp1_p, scaled, comp1_spatial_disp, global, comp1_spatial_lm_nv, global, comp1_u, global}
      atolvaluemethod = {comp1_p, factor, comp1_spatial_disp, factor, comp1_spatial_lm_nv, factor, comp1_u, factor}
      atolfactor = {comp1_p, 1, comp1_spatial_disp, 0.1, comp1_spatial_lm_nv, 0.1, comp1_u, 0.1}
      maxorder = 2
      stabcntrl = on
      bwinitstepfrac = 0.01
      estrat = exclude
      rhoinf = 0.5
      predictor = constant
      arDef: AutoRemesh "Automatic Remeshing"
        autoremeshgeom = geom1
        stopcondtype = general
        stopgenexpr = sqrt(comp1.spatial.I1isoMax)>1.3
      se1: Segregated
        maxsegiter = 1000
        ntolfact = 0.5
        segstabacc = segaacc
        segaaccdim = 5
        segaaccmix = 0.9
        segaaccdelay = 1
        ss1: SegregatedStep "Velocity u, Pressure p"
          segvar = {comp1_u, comp1_p}
          linsolver = i1
          subdamp = 0.8
          subjtech = once
        ss2: SegregatedStep "Spatial Mesh Displacement"
          segvar = {comp1_spatial_disp, comp1_spatial_lm_nv}
          linsolver = d1
          subdamp = 0.8
          subjtech = onevery
          subntolfact = 0.1
      i1: Iterative "AMG, fluid flow variables (spf)" | maxlinit = 100; rhob = 20
        mg1: Multigrid | prefun = saamg; maxcoarsedof = 80000; strconn = 0.02; saamgcompwise = on
      d1: Direct "Direct, spatial mesh displacement (spf)" | linsolver = pardiso; pivotperturb = 1.0E-13
  sol2 "对解重新划分网格 1" (study std1)

Datasets
  dset1: Solution | solution = sol1
  surf1: Surface "外壁" on boundaries 4 | data = dset1
  dset2: Solution | solution = sol2
  surf2: Surface "外壁 1" on boundaries 4 | data = dset2

Derived values
  gev1: EvalGlobal "全局计算 1" | data = dset2; table = tbl1; expr = {center_z, center_x, center_y}

Tables
  tbl1: Table
    // 全局计算 1
    Time | center_z | center_x | center_y
    0 | -11 | -7.20633e-06 | -7.81412e-06
    0.01 | -10.9999 | -7.19958e-06 | -7.8116e-06
    0.02 | -10.9996 | -7.19336e-06 | -7.81043e-06
    0.03 | -10.9991 | -7.18396e-06 | -7.80711e-06
    0.04 | -10.9984 | -7.16926e-06 | -7.8079e-06
    0.05 | -10.9976 | -7.15085e-06 | -7.81154e-06
    0.06 | -10.9965 | -7.13011e-06 | -7.81693e-06
    0.07 | -10.9953 | -7.10699e-06 | -7.82692e-06
    0.08 | -10.9938 | -7.08135e-06 | -7.841e-06
    0.09 | -10.9922 | -7.05318e-06 | -7.85919e-06
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
Plots
  pg1: PlotGroup3D "速度 (spf)" | data = dset1
    slc1: Slice "切面" | expr = spf.U
  pg2: PlotGroup3D "压力 (spf)" | data = surf1
    surf1: Surface "表面" | expr = p
      tran1: Transparency "透明 1"
  pg3: PlotGroup3D "动网格" | data = dset1
    mesh1: Mesh "网格 1" | meshdomain = volume; qualmeasure = custom; qualexpr = comp1.spatial.relVol
      sel1: MeshSelection "选择 1" on domains 1, 2
  pg4: PlotGroup3D "bubble" | data = dset1
    vol1: Volume "体 1" | expr = spf.rho; descr = Density
  pg5: PlotGroup3D "速度 (spf) 1" | data = dset2
    slc1: Slice "切面" | expr = spf.U
  pg6: PlotGroup3D "压力 (spf) 1" | data = surf2
    surf1: Surface "表面" | expr = p
      tran1: Transparency "透明 1"
  pg7: PlotGroup3D "动网格 1" | data = dset2
    mesh1: Mesh "网格 1" | meshdomain = volume; qualmeasure = custom; qualexpr = comp1.spatial.relVol
      sel1: MeshSelection "选择 1" on domains 1, 2
  pg8: PlotGroup3D "切面" | data = dset1
    slc1: Slice "切面 1" | expr = spf.rho; descr = Density
  pg9: PlotGroup1D "center" | data = dset2; xlabel = Time; ylabel = Z; yseclabel = XY
    glob1: Global | expr = center_z; descr = Z
    glob2: Global | expr = {center_x, center_y}; descr = {X, Y}; xdata = fourier