// COMSOL Multiphysics 6.2.0.290 model "bubble_basic_model.mph"
// Outline of the model tree
// Unit system: none

Parameters
  radius = 1  // radius
  L_rise = 0.5  // para1
  center = 2.5  // center
  height = L_rise+center+1  // height
  width = 8  // width
  Ga = 1  // para2
  Bo = 0.1  // para3
  rho1 = 1  // rho1
  rho2 = rho1/1000  // rho2
  mu1 = 1/Ga  // mu1
  mu2 = mu1/100  // mu2
  refine = 7
  sigma = 1/Bo  // sigma
  g_used = 1
  t_step = 0.01
  t_max = 100

Variables
  var1 "Variables 1"
    velocity = intop1(w)/area  // velocity
    center = intop1(z)/area  // center
    max_x = maxop1(r)  // max_x
    max_y = maxop1(z)  // max_y
    min_y = minop1(z)  // min_y
    ratio = max_x/((max_y-min_y)/2)  // ratio
    area = intop1(1.0)  // area
    R_eq = (area/(4*pi/3))^(1/3)  // R_eq
    E_k = intop2(0.5*rho1*(spf.U)^2)
    E_P = intop1(rho1*g_used*abs(z))
    E_e = spf.Qvd_tot
    E_s = intop3(1)*sigma
    max_y_Axi = maxop2(z)
    min_y_Axi = minop2(z)
    velocity_min = intop1(minV)/area

Couplings
  intop1: Integration on domains 2 | axisym = on
  maxop1: Maximum on domains 2
  minop1: Minimum on domains 2
  intop2: Integration on domains 1, 3 | axisym = on
  intop3: Integration "积分 3" on boundaries 11, 12 | axisym = on
  maxop2: Maximum on boundaries 3, 4
  minop2: Minimum on boundaries 3, 4

Common definitions
  free1: DeformingDomain on all domains
  fix1: FixedBoundary on boundaries 2, 6, 8-10
  sym1: Symmetry "Symmetry/Roller 1" on boundaries 1, 3-5
  state1: StateVariables on all domains
    state = minV
    initialValue = 0
    updateExpression = if(velocity<minV,velocity,minV)
    order = 8
    update = afterStep

Geometry
  geom1 "Geometry 1" (2D axisymmetric, length unit m)
    r1: Rectangle | pos = {0, -height}; size = {width, height}
    c1: Circle | pos = {0, -height+center}; rot = -90; angle = 180
    ls1: LineSegment | specify1 = coord; coord1 = {4*radius, 0}; specify2 = coord; coord2 = {4*radius, -height}
    fin: Finalize "Form Union"

Materials
  mat1: Common "liquid" on all domains
    def "Basic"
      density = rho1
      dynamicviscosity = mu1
  mat2: Common "air" on domains 2
    def "Basic"
      density = rho2
      dynamicviscosity = mu2

Physics
  spf: LaminarFlow on all domains
    dependent variable u = {u, v, w}
    PhysicalModelProperty.IncludeGravity = 1
    ConsistentStabilization.CrosswindDiffusion = 0
    fp1: FluidProperties (default)
    init1: init "Initial Values 1" (default)
    axi1: AxialSymmetry (default)
    wallbc1: WallBC "Wall 1" (default)
    grav1: Gravity | g = {0, 0, -g_used}
    inl1: InletBoundary "Inlet 1" on boundaries 2, 8
    out1: OutletBoundary "Outlet 1" on boundaries 10
    ffi1: FluidFluidInterface on boundaries 11, 12 | SurfaceTensionCoefficient = userdef; sigma = sigma
      cnta1: ContactAngle (default)
  ge1: GlobalEquations "Global ODEs and DAEs 1"
    EquationForm.form = Automatic
    ge1: GlobalEquations
      name = Int_Ee
      equation = d(Int_Ee,t)-E_e
      initialValueU = 0
      initialValueUt = 0
      valueType = complex
      fieldName = ODE1
      DependentVariableQuantity = dimensionless
      CustomDependentVariableUnit = m
      SourceTermQuantity = dimensionless
      CustomSourceTermUnit = m
  ge4: GlobalEquations "Global ODEs and DAEs 4"
    EquationForm.form = Automatic
    ge1: GlobalEquations
      name = Int_t_0001
      equation = d(Int_t_0001,t)-if(t>0.5&&abs(velocity)<0.002,1,0)
      valueType = complex
      fieldName = ODE4
      DependentVariableQuantity = dimensionless
      CustomDependentVariableUnit = m
      SourceTermQuantity = dimensionless
      CustomSourceTermUnit = m

Mesh
  mesh1 "Mesh 1"
    size: MeshSizeDefault | table = cfd; hmax = 1/4; hmin = 1/32; hgrad = 1.05; hauto = 1; custom = on
    edg1: Edge on boundaries 3, 4, 6, 11, 12
      size1: Size on entire geometry
        table = cfd
        hmax = 1/(2^refine)
        hmin = 1/(2^refine*32)
        hnarrow = 3
        hgrad = 1.05
        hauto = 1
        custom = on
    ftri1: FreeTri "Free Triangular 1" on domains 1, 2
      size1: Size on domains 1, 2
        table = cfd
        hmax = 1/16
        hmin = 1/(2^refine*32)
        hgrad = 1.05
        hauto = 1
        custom = on
        hnarrow = 1
    ftri2: FreeTri "Free Triangular 2" on remaining entities

Studies
  std1 "Study 1"
    time: Transient "Time Dependent"
      tlist = range(0,t_step,t_max)
      rtol = 0.005
      discretization = {spf, physics, ge1, physics, ge4, physics, frame:spatial1, physics, frame:material1, physics, state:state1, physics}
      equationform = {spf, physics, ge1, physics, ge4, physics, frame:spatial1, physics, frame:material1, physics, state:state1, physics}
      equationform_freq = {spf, 1[kHz], ge1, 1[kHz], ge4, 1[kHz], frame:spatial1, 0, frame:material1, 0, state:state1, 0}
      autoremesh = on

Solver configurations
  sol1 "Solution 1" (study std1)
    v1: Variables "Dependent Variables 1"
      comp1_spatial_disp: Field "Spatial mesh displacement (comp1.spatial.disp)"
        scalemethod = manual
        scaleval = 0.00429737012602
    t1: Time "Time-Dependent Solver 1"
      tlist = range(0,t_step,t_max)
      rtol = 0.005
      atolglobalfactor = 0.05
      atolmethod = {comp1_p, scaled, comp1_spatial_disp, global, comp1_spatial_lm_nv, global, comp1_u, global, comp1_ODE2, global, comp1_ODE3, global, comp1_ODE4, global}
      atolvaluemethod = {comp1_p, factor, comp1_spatial_disp, factor, comp1_spatial_lm_nv, factor, comp1_u, factor, comp1_ODE2, factor, comp1_ODE3, factor, comp1_ODE4, factor}
      atolfactor = {comp1_p, 1, comp1_spatial_disp, 0.1, comp1_spatial_lm_nv, 0.1, comp1_u, 0.1, comp1_ODE2, 0.1, comp1_ODE3, 0.1, comp1_ODE4, 0.1}
      maxorder = 2
      stabcntrl = on
      bwinitstepfrac = 0.01
      estrat = exclude
      rhoinf = 0.5
      predictor = constant
      arDef: AutoRemesh "Automatic Remeshing"
        autoremeshgeom = geom1
        stopcondtype = general
        stopval = 0.5
        stopgenexpr = sqrt(comp1.spatial.I1isoMax)>1.3
        remeshtimes = range(0,t_step*10,t_max)
        remeshtimestep = if(center<-1.5,10,1)
        consistentremesh = on
      fc1: FullyCoupled
        linsolver = d1
        maxiter = 1000
        ntolfact = 0.5
        damp = 0.9
        jtech = onevery
        stabacc = aacc
        aaccdim = 5
        aaccmix = 0.9
        aaccdelay = 1
      d1: Direct "Direct, fluid flow variables () (merged)" | linsolver = pardiso; pivotperturb = 1.0E-13
  sol2 "Remeshed Solution 1" (study std1)

Datasets
  dset1: Solution | solution = sol1
  dset2: Solution | solution = sol2
  mir1: Mirror2D "二维镜像 1" | data = dset2

Derived values
  gev1: EvalGlobal "Global Evaluation 1"
    data = dset2
    table = new
    expr = {velocity, center, max_x, max_y, min_y, ratio, area, R_eq, E_k, E_P, E_e, E_s, Int_Ee}

Plots
  pg1: PlotGroup2D "Velocity (spf)" | data = dset2; dataisaxisym = on
    surf1: Surface | expr = spf.U
  pg2: PlotGroup2D "Pressure (spf)" | data = dset2; dataisaxisym = on
    con1: Contour | expr = p; levelrounding = off
  pg4: PlotGroup2D "V_Ee" | data = dset2
    surf3: Surface "spf.Qvd" | data = mir1; expr = spf.Qvd
    surf1: Surface "spf.U" | expr = spf.U
    str1: Streamline "流线 1" on boundaries 11, 12 | expr = {u, w}; udist = 0.01; pointtype = arrow
  pg5: PlotGroup1D "velocity" | data = dset2
    glob1: Global | expr = {velocity, }

Exports
  anim1: Animation "Video" | movietype = webm; aviqual = 1; webmcqlevel = 1; framesel = all; maxframes = 100; size = hd